// COMSOL Multiphysics 4.2a (Build: 166) model "Case_II_Longitudinal_n0.mph"
// Outline of the model tree

Parameters
  RM = 1e3[ohm*cm^2]
  CM = 1[uF/cm^2]
  rho_i = 100[ohm*cm]
  rho_e = 100[ohm*cm]
  a = 1[um]
  b = 1.05[um]
  HoC = 50[um]
  IA = 1
  w = .1[kHz]
  Sig = 1e-6
  A0 = 2e-4

Functions
  gp1: GaussianPulse | sigma = Sig

Variables
  var1 "Variables 1"
    VA = A0*gp1(z)
    Vm = Vi-Ve

Geometry
  geom1 "Geometry 1" (3D, length unit m)
    CYL2: Cylinder | pos = {0, 0, -HoC/2}; axis = {0, 0, 1}; r = b; h = HoC
    CYL1: Cylinder | pos = {0, 0, -HoC/2}; axis = {0, 0, 1}; r = a; h = HoC
    fin: Finalize "Form Union"

Physics
  wb: WeakFormBoundaryPDE "PDE" (disabled) on boundaries 5, 6, 10, 11
    dependent variable Vm
    wfeq1: WeakFormPDE (default) | weak = ((-dc_i.nJ)-Vm/RM)*test(Vm)
    init1: init "Initial Values 1" (default)
    wfeq2: WeakFormPDE on boundaries 5, 6, 10, 11 | weak = -CM*Vmt*test(Vm)
  dc_i: ConductiveMedia "Electric Currents" on domains 2
    dependent variable Vi
    ShapeProperty.frame = spatial
    EquationForm.form = Stationary
    cucn1: CurrentConservation (default)
      sigma_mat = userdef
      sigma = 1/rho_i
      rho0_mat = userdef
      rho0 = 1.72e-8
      Tref_mat = userdef
      Tref = 293
      alpha_mat = userdef
      alpha = 0.0039
      minput_temperature = 293
    ein1: ElectricInsulation (default)
    init1: init "Initial Values 1" (default)
    pot1: ElectricPotential on boundaries 5, 6, 10, 11 | V0 = Vm+Ve
    gnd1: Ground on boundaries 7, 8
  dc_e: ConductiveMedia "Electric Currents 2" on domains 1
    dependent variable Ve
    ShapeProperty.frame = spatial
    EquationForm.form = Stationary
    cucn1: CurrentConservation (default)
      sigma_mat = userdef
      sigma = 1/rho_e
      rho0_mat = userdef
      rho0 = 1.72e-8
      Tref_mat = userdef
      Tref = 293
      alpha_mat = userdef
      alpha = 0.0039
      minput_temperature = 293
    ein1: ElectricInsulation (default)
    init1: init "Initial Values 1" (default)
    ncd1: NormalCurrentDensity (disabled) on boundaries 1, 2, 9, 12 | nJ = -JA
    ncd2: NormalCurrentDensity on boundaries 5, 6, 10, 11 | nJ = CM*(Vit-Vet)+(Vm)/RM
    gnd1: Ground on boundaries 3, 4
    pot1: ElectricPotential on boundaries 1, 2, 9, 12 | V0 = VA

Mesh
  mesh2 "Mesh 2"
    size: MeshSizeDefault | hmax = 1E-6; hmin = 1E-7; hgrad = 1.5; hauto = 2; custom = on
    ftet1: FreeTet "Free Tetrahedral 1" on remaining entities

Studies
  mgmcases "Study"
    param: Parametric "Parametric Sweep" | pname = b; plist = range(1.05[um],.05[um],2[um])
    stat: Stationary

Solver configurations
  sol1 "Solver 1" (study mgmcases)
    v1: Variables "Dependent Variables 1"
    s1: Stationary "Stationary Solver 1"
      dDef: Direct
      fc1: FullyCoupled
  sol2 "Parametric 2" (study mgmcases)

Datasets
  dset1: Solution | solution = sol1
  edg1: Edge3D on edges 6 | data = dset2
  gp1_ds1: Function1D
  gp1_ds2: Function1D
  cpl1: CutPlane
    data = dset1
    planetype = general
    genmethod = threepoint
    genpoints = 
      {-3.59315E-7, -7.06191E-7, -1.35848E-5}
      {-0.71549, -7.06191E-7, 0.69861}
      {0.235589, 0.941426, 0.241263}
  dset2: Solution | solution = sol2

Tables
  tbl1: Table
    // Surface Integration 1 ((dc_e.nJ))
    Time | (dc_e.nJ) (A)
    0 | 7.53854e-08
    0.05 | 7.53854e-08
    0.1 | 7.53854e-08

Plots
  pg1: PlotGroup3D "3D Plot Group 1"
    data = dset2
    inputmode = planedir
    planefirst = {-8.99010277185e-07, -4.29477567294e-07, -1.41375402701e-05}
    planesecond = {1.80380659233e-07, -9.82904811286e-07, -1.30320919526e-05}
    cutplanedshash = 1743487000
    cutplanepgds = cpl1
    surf1: Surface | data = dset2; expr = Vm
  pg2: PlotGroup3D "Electric Potential (dc_i)" | data = dset1
    mslc1: Multislice | expr = Vi
  pg3: PlotGroup3D "Electric Potential (dc_e)" | data = dset1
    mslc1: Multislice | expr = Ve
  pg4: PlotGroup1D "1D Plot Group 4" | data = dset1
    lngr1: LineGraph | data = edg1; expr = Vm; xdata = expr; xdataexpr = z
  pg5: PlotGroup2D "2D Plot Group 5" | data = cpl1
    surf1: Surface | expr = Vm
  pg6: PlotGroup3D "Electric Potential (dc_i) 1" | data = dset2
    mslc1: Multislice | expr = Vi
  pg7: PlotGroup3D "Electric Potential (dc_e) 1" | data = dset2
    mslc1: Multislice | expr = Ve

Exports
  plot1: Plot | filename = E:\BVA\Publications\JNE\OurPaper1\MATLAB FILES\VA\n0_VM_dSweep.txt